// COMSOL Multiphysics 5.3.1.348 model "H-1-Belgacem.mph"
// Outline of the model tree

Variables
  var1 "Variables 1"
    eig = -0.49925

Geometry
  geom1 "Geometry 1" (2D axisymmetric, length unit m)
    c1: Circle | rot = -90; r = 2; angle = 180
    c2: Circle | rot = -90; r = 30; angle = 180
    fin: Finalize "Form Union"

Physics
  c: CoefficientFormPDE on all domains
    dependent variable phi
    cfeq1: CoefficientFormPDE (default) | c = {r/2, 0, 0, r/2}; a = -r/sqrt(r^2+z^2); f = 0; da = r
    zflx1: ZeroFluxBoundary "Zero Flux 1" (default)
    init1: init "Initial Values 1" (default) | phi = 1
    dir1: DirichletBoundary "Dirichlet Boundary Condition 1" (disabled) on boundaries 5, 8 | r = 0
    flux1: FluxBoundary "Flux/Source 1" on boundaries 5, 8 | q = (r/2)*sqrt(-2*(eig+(1/30)))

Mesh
  mesh1 "Mesh 1" (physics-controlled)
    size: MeshSizeDefault | hauto = 4

Studies
  std1 "Study 1"
    eigv: Eigenvalue | neigs = 1; shift = -1

Solver configurations
  sol1 "Solution 1" (study std1)
    v1: Variables "Dependent Variables 1"
    e1: Eigenvalue "Eigenvalue Solver 1"
      dDef: Direct

Datasets
  dset1: Solution | solution = sol1
  rev1: Revolve2D "Revolution 2D 1" | data = dset1; startangle = -90; revangle = 225

Derived values
  int1: IntSurface "Surface Integration 1" on domains 1, 2 | data = dset1; table = tbl3; expr = abs(phi^2)*2*pi*r
  pev1: EvalPoint "Point Evaluation 1" | data = dset1; expr = phi

Tables
  tbl1: Table
    // Surface Integration 2 (sqrt(r^2+z^2))
    Eigenvalue (rad/s) | 1 (m^3)
    -0.499247 | 33.5095
  tbl3: Table
    // Surface Integration 1 (phi*phi)
    Eigenvalue (rad/s) | abs(phi^2)*2*pi*r (m^3) | abs(phi^2)*2*pi*r (m^3) | abs(phi^2)*2*pi*r (m^3) | abs(phi^2)*2*pi*r (m^3) | abs(phi^2)*2*pi*r (m^3)
    -0.499247 | 378.601 | 378.426 | 378.426 | 378.588 | 378.588
  tbl4: Table
    // Surface Integration 2 (1)
    Eigenvalue (rad/s) | 1 (m^3)
    -0.499247 | 33.5099
  tbl5: Table
    // Surface Integration 2 (2*pi*r)
    Eigenvalue (rad/s) | 2*pi*r (m^4)
    -0.499247 | 248.047
  tbl6: Table
    // Surface Integration 2 (1)
    Eigenvalue (rad/s) | 1 (m^3)
    -0.499247 | 33.5099

Plots
  pg1: PlotGroup2D "2D Plot Group 1" | data = dset1
    surf1: Surface | expr = phi
  pg2: PlotGroup3D "3D Plot Group 2" | data = rev1
    surf1: Surface | expr = phi